variable        DT              equal -10.0
variable        ETA             equal 1.6

# ----------------- Init Section -----------------

units           metal
boundary        p p f
atom_style      full

pair_style      coul/long 5.0
kspace_style    pppm/electrode 1.0e-6
kspace_modify   gewald 0.5 slab 3.0

# ----------------- Atom Definition Section -----------------

read_data       system.data
restart         100000 system.restart

# ----------------- Force Field Section -----------------

pair_coeff      * *

# O H Cs Cl Au
mass            1 16.0
mass            2 1.0
mass            3 132.90545
mass            4 35.5
mass            5 196.967

#----------------- Def groups and variables -----------------

group           slab type 5

# ----------------- Normal setting -----------------

neighbor        2.0 bin
neigh_modify    every 10 delay 0 check no

fix             fconq slab electrode/conq ${DT} ${ETA}

dump            traj all custom 1 dump.lammpstrj id element xu yu zu fx fy fz q
dump_modify     traj element O H Cs Cl Au sort id format float %20.15g

run             0
write_data      after_system.data nocoeff
